OpenVSP model (file version 5), 2 components.
Geometry view with OpenVSP parameter names; values to 6 digits, angles in degrees, lengths in the model's unit.
Overall bounding box: X_Min=0.00315133 X_Len=3.06323 Y_Min=-6.14415 Y_Len=12.2883 Z_Min=-0.121774 Z_Len=0.406536

Wing "WingGeom"
  location (X Y Z) 0 0 0, rotation 0 0 0
  symmetric about XZ
  bounding box size 3.06323 12.2883 0.406536
  totals: TotalSpan=12.3 TotalProjectedSpan=12.2883 TotalChord=0.820417 TotalArea=10.0911 TotalAR=14.9638
  root: chord 1.3125, twist 8.3274, airfoil file "RhoFW Root"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 BaseThickChord=0.120305 ThickChord=0.120305
  sections:
    n   Span    Root_Chord  Tip_Chord  Area      Sweep  Sweep_Location  Dihedral  Twist    Twist_Location  tip airfoil
    1   0.3075  1.3125      1.26329    0.396028  24     0               2.5       8.5524   0.25            airfoil file "g:/My Drive/temp/Prandtl/WingGeom_KIUZBJNXVZ_1.dat"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 BaseThickChord=0.120014 ThickChord=0.120014
    2   0.3075  1.26329     1.21408    0.380896  24     0               2.5       8.7259   0.25            airfoil file "g:/My Drive/temp/Prandtl/WingGeom_KIUZBJNXVZ_2.dat"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 BaseThickChord=0.118829 ThickChord=0.118829
    3   0.3075  1.21408     1.16488    0.365765  24     0               2.5       8.8441   0.25            airfoil file "g:/My Drive/temp/Prandtl/WingGeom_KIUZBJNXVZ_3.dat"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 BaseThickChord=0.117649 ThickChord=0.117649
    4   0.3075  1.16488     1.11567    0.350635  24     0               2.5       8.903    0.25            airfoil file "g:/My Drive/temp/Prandtl/WingGeom_KIUZBJNXVZ_4.dat"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 BaseThickChord=0.116473 ThickChord=0.116473
    5   0.3075  1.11567     1.06646    0.335502  24     0               2.5       8.8984   0.25            airfoil file "g:/My Drive/temp/Prandtl/WingGeom_KIUZBJNXVZ_5.dat"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 BaseThickChord=0.115302 ThickChord=0.115302
    6   0.3075  1.06646     1.01725    0.32037   24     0               2.5       8.8257   0.25            airfoil file "g:/My Drive/temp/Prandtl/WingGeom_KIUZBJNXVZ_6.dat"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 BaseThickChord=0.114137 ThickChord=0.114137
    7   0.3075  1.01725     0.96804    0.305238  24     0               2.5       8.6801   0.25            airfoil file "g:/My Drive/temp/Prandtl/WingGeom_KIUZBJNXVZ_7.dat"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 BaseThickChord=0.112977 ThickChord=0.112977
    8   0.3075  0.96804     0.91883    0.290106  24     0               2.5       8.4565   0.25            airfoil file "g:/My Drive/temp/Prandtl/WingGeom_KIUZBJNXVZ_8.dat"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 BaseThickChord=0.111822 ThickChord=0.111822
    9   0.3075  0.91883     0.86963    0.274976  24     0               2.5       8.1492   0.25            airfoil file "g:/My Drive/temp/Prandtl/WingGeom_KIUZBJNXVZ_9.dat"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 BaseThickChord=0.110673 ThickChord=0.110673
    10  0.3075  0.86963     0.82042    0.259845  24     0               2.5       7.7522   0.25            airfoil file "g:/My Drive/temp/Prandtl/WingGeom_KIUZBJNXVZ_10.dat"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 BaseThickChord=0.10953 ThickChord=0.10953
    11  0.3075  0.82042     0.77121    0.244713  24     0               2.5       7.2592   0.25            airfoil file "g:/My Drive/temp/Prandtl/WingGeom_KIUZBJNXVZ_11.dat"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 BaseThickChord=0.108392 ThickChord=0.108392
    12  0.3075  0.77121     0.722      0.229581  24     0               2.5       6.6634   0.25            airfoil file "g:/My Drive/temp/Prandtl/WingGeom_KIUZBJNXVZ_12.dat"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 BaseThickChord=0.107261 ThickChord=0.107261
    13  0.3075  0.722       0.67279    0.214449  24     0               2.5       5.9579   0.25            airfoil file "g:/My Drive/temp/Prandtl/WingGeom_KIUZBJNXVZ_13.dat"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 BaseThickChord=0.106137 ThickChord=0.106137
    14  0.3075  0.67279     0.62358    0.199317  24     0               2.5       5.1362   0.25            airfoil file "g:/My Drive/temp/Prandtl/WingGeom_KIUZBJNXVZ_14.dat"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 BaseThickChord=0.105019 ThickChord=0.105019
    15  0.3075  0.62358     0.57438    0.184186  24     0               2.5       4.1927   0.25            airfoil file "g:/My Drive/temp/Prandtl/WingGeom_KIUZBJNXVZ_15.dat"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 BaseThickChord=0.103909 ThickChord=0.103909
    16  0.3075  0.57438     0.52517    0.169056  24     0               2.5       3.1253   0.25            airfoil file "g:/My Drive/temp/Prandtl/WingGeom_KIUZBJNXVZ_16.dat"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 BaseThickChord=0.102809 ThickChord=0.102809
    17  0.3075  0.52517     0.47596    0.153924  24     0               2.5       1.9394   0.25            airfoil file "g:/My Drive/temp/Prandtl/WingGeom_KIUZBJNXVZ_17.dat"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 BaseThickChord=0.101719 ThickChord=0.101719
    18  0.3075  0.47596     0.42675    0.138792  24     0               2.5       0.6589   0.25            airfoil file "g:/My Drive/temp/Prandtl/WingGeom_KIUZBJNXVZ_18.dat"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 BaseThickChord=0.100639 ThickChord=0.100639
    19  0.3075  0.42675     0.37754    0.12366   24     0               2.5       -0.6417  0.25            airfoil file "g:/My Drive/temp/Prandtl/WingGeom_KIUZBJNXVZ_19.dat"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 BaseThickChord=0.0995691 ThickChord=0.0995691
    20  0.3075  0.37754     0.328333   0.108528  24     0               2.5       -1.6726  0.25            airfoil file "RhoFW Tip"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 BaseThickChord=0.0963634 ThickChord=0.0963634

Mesh "MeshGeom"
  location (X Y Z) 0 0 0, rotation 0 0 0
  triangle mesh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
