<?xml version="1.0"?>
<?xml-stylesheet type="text/xsl" href="http://jsbsim.sourceforge.net/JSBSim.xsl"?>
<fdm_config name="PrandtlD" version="2.0" release="ALPHA"
   xmlns:xsi="http://www.w3.org/2001/XMLSchema-instance"
   xsi:noNamespaceSchemaLocation="http://jsbsim.sourceforge.net/JSBSim.xsd">

 <fileheader>
  <author> N. Agenbag </author>
  <filecreationdate> 2024-03-25 </filecreationdate>
  <version>$Revision: 0.10 $</version>
  <description> Prandtl D 12.3m vlerkspan. </description>
 </fileheader>

<!--
  File:     PrandtlD.xml
  Inputs:
    name:          PrandtlD
    type:          light single
    max weight:    85.9 kg
    wing span:     12.3 m
    length:        x.xxx m
    wing area:     10.091 m^2
    gear type:     tricycle
    retractable?:  ja
    # engines:     1
    engine type:   elektries
    engine layout: aft fuselage
    yaw damper?    nee

  Outputs:
    wing loading:  8.51 kg/m^2
    CL-alpha:      5 per radian
    CL-0:          0.25
    CL-max:        1.4
    CD-0:          0.024
    K:             0.04

Begin weergawe van PrandtlD maar met meeuvlerk data.
-->

 <metrics>
   <wingarea  unit="M2">  10.091 </wingarea>
   <wingspan  unit="M" >   12.3 </wingspan>
   <wing_incidence>          0.00 </wing_incidence>
   <chord     unit="M" >    0.82 </chord>
   <htailarea unit="M2">    0.00 </htailarea>
   <htailarm  unit="M" >    0.00 </htailarm>
   <vtailarea unit="M2">    0.00 </vtailarea>
   <vtailarm  unit="M" >    0.00 </vtailarm>
   <location name="AERORP" unit="M">
     <x>  1.297 </x>
     <y>  0.000 </y>
     <z>  0.099 </z>
   </location>
   <location name="EYEPOINT" unit="M">
     <x>  0.00 </x>
     <y>  0.00 </y>
     <z>  0.00 </z>
   </location>
   <location name="VRP" unit="M">
     <x>0</x>
     <y>0</y>
     <z>0</z>
   </location>
 </metrics>

 <mass_balance>
   <ixx unit="KG*M2">599.435</ixx>
   <iyy unit="KG*M2">38.498</iyy>
   <izz unit="KG*M2">636.889</izz>
   <ixy unit="KG*M2">0.0</ixy>
   <ixz unit="KG*M2">0.0</ixz>
   <iyz unit="KG*M2">0.0</iyz>
   <emptywt unit="KG">85.9</emptywt>

  <location name="CG" unit="M">
     <x>1.297</x>
     <y>0.0</y>
     <z>0.099</z>
  </location>
 </mass_balance>

 <ground_reactions>

  <contact type="BOGEY" name="NOSE">
   <location unit="IN">
     <x>  -103.79 </x>
     <y>   0.00 </y>
     <z> -59.06 </z>
   </location>
   <static_friction>  0.80 </static_friction>
   <dynamic_friction> 0.50 </dynamic_friction>
   <rolling_friction> 0.02 </rolling_friction>
   <spring_coeff unit="LBS/FT">        120.00 </spring_coeff>
   <damping_coeff unit="LBS/FT/SEC">    10.0 </damping_coeff>
   <max_steer unit="DEG"> 5.00 </max_steer>
   <brake_group>NONE</brake_group>
   <retractable>1</retractable>
 </contact>

  <contact type="BOGEY" name="LEFT_MAIN">
   <location unit="IN">
     <x>  73.37 </x>
     <y> -78.74 </y>
     <z> -59.06 </z>
   </location>
   <static_friction>  0.80 </static_friction>
   <dynamic_friction> 0.50 </dynamic_friction>
   <rolling_friction> 0.02 </rolling_friction>
   <spring_coeff unit="LBS/FT">        120.00 </spring_coeff>
   <damping_coeff unit="LBS/FT/SEC">    10.0 </damping_coeff>
   <max_steer unit="DEG">0</max_steer>
   <brake_group>LEFT</brake_group>
   <retractable>1</retractable>
 </contact>

  <contact type="BOGEY" name="RIGHT_MAIN">
   <location unit="IN">
     <x>  73.37 </x>
     <y>  78.74 </y>
     <z> -59.06 </z>
   </location>
   <static_friction>  0.80 </static_friction>
   <dynamic_friction> 0.50 </dynamic_friction>
   <rolling_friction> 0.02 </rolling_friction>
   <spring_coeff unit="LBS/FT">        120.00 </spring_coeff>
   <damping_coeff unit="LBS/FT/SEC">    10.0 </damping_coeff>
   <max_steer unit="DEG">0</max_steer>
   <brake_group>RIGHT</brake_group>
   <retractable>1</retractable>
 </contact>

 </ground_reactions>

 <propulsion>

   <engine file="BrushlessMotor">
    <location unit="M">
      <x>  1.297 </x>
      <y>  0.000 </y>
      <z>  0.099 </z>
    </location>
    <orient unit="DEG">
      <pitch> 0.00 </pitch>
      <roll>   0.00 </roll>
      <yaw>   0.00 </yaw>
    </orient>
    <feed>0</feed>
    <thruster file="PrandtlPropeller">
     <location unit="M">
       <x>  1.297 </x>
       <y>  0.000 </y>
       <z>  0.099 </z>
     </location>
     <orient unit="DEG">
       <pitch> 0.00 </pitch>
       <roll>   0.00 </roll>
       <yaw>   0.00 </yaw>
     </orient>
    </thruster>
  </engine>

  <tank type="FUEL" number="0">
     <location unit="M">
       <x>  1.297 </x>
       <y>  0.000 </y>
       <z>  0.099 </z>
     </location>
     <capacity unit="LBS"> 100.00 </capacity>
     <contents unit="LBS">  50.00 </contents>
  </tank>

  <tank type="FUEL" number="1">
     <location unit="M">
       <x>  1.297 </x>
       <y>  0.000 </y>
       <z>  0.099 </z>
     </location>
     <capacity unit="LBS"> 100.00 </capacity>
     <contents unit="LBS">  50.00 </contents>
  </tank>

 </propulsion>

 <flight_control name="FCS: PrandtlD">

  <channel name="Pitch">
   <summer name="Pitch Trim Sum">
      <input>fcs/elevator-cmd-norm</input>
      <input>fcs/pitch-trim-cmd-norm</input>
      <clipto>
        <min> -1 </min>
        <max>  1 </max>
      </clipto>
   </summer>

   <aerosurface_scale name="Elevator Control">
      <input>fcs/pitch-trim-sum</input>
      <range>
        <min> -0.35 </min>
        <max>  0.35 </max>
      </range>
      <output>fcs/elevator-pos-rad</output>
   </aerosurface_scale>

   <aerosurface_scale name="elevator normalization">
      <input>fcs/elevator-pos-rad</input>
      <domain>
        <min> -0.35 </min>
        <max>  0.35 </max>
      </domain>
      <range>
        <min> -1 </min>
        <max>  1 </max>
      </range>
      <output>fcs/elevator-pos-norm</output>
   </aerosurface_scale>

  </channel>

  <channel name="Roll">
   <summer name="Roll Trim Sum">
      <input>fcs/aileron-cmd-norm</input>
      <input>fcs/roll-trim-cmd-norm</input>
      <clipto>
        <min> -1 </min>
        <max>  1 </max>
      </clipto>
   </summer>

   <aerosurface_scale name="Left Aileron Control">
      <input>fcs/roll-trim-sum</input>
      <range>
        <min> -0.35 </min>
        <max>  0.35 </max>
      </range>
      <output>fcs/left-aileron-pos-rad</output>
   </aerosurface_scale>

   <aerosurface_scale name="Right Aileron Control">
      <input>fcs/roll-trim-sum</input>
      <range>
        <min> -0.35 </min>
        <max>  0.35 </max>
      </range>
      <output>fcs/right-aileron-pos-rad</output>
   </aerosurface_scale>

   <aerosurface_scale name="left aileron normalization">
      <input>fcs/left-aileron-pos-rad</input>
      <domain>
        <min> -0.35 </min>
        <max>  0.35 </max>
      </domain>
      <range>
        <min> -1 </min>
        <max>  1 </max>
      </range>
      <output>fcs/left-aileron-pos-norm</output>
   </aerosurface_scale>

   <aerosurface_scale name="right aileron normalization">
      <input>fcs/right-aileron-pos-rad</input>
      <domain>
        <min> -0.35 </min>
        <max>  0.35 </max>
      </domain>
      <range>
        <min> -1 </min>
        <max>  1 </max>
      </range>
      <output>fcs/right-aileron-pos-norm</output>
   </aerosurface_scale>

  </channel>

  <channel name="Yaw">
   <summer name="Rudder Command Sum">
      <input>fcs/rudder-cmd-norm</input>
      <input>fcs/yaw-trim-cmd-norm</input>
      <clipto>
        <min> -0.35 </min>
        <max>  0.35 </max>
      </clipto>
   </summer>

   <aerosurface_scale name="Rudder Control">
      <input>fcs/rudder-command-sum</input>
      <range>
        <min> -0.35 </min>
        <max>  0.35 </max>
      </range>
      <output>fcs/rudder-pos-rad</output>
   </aerosurface_scale>

   <aerosurface_scale name="rudder normalization">
      <input>fcs/rudder-pos-rad</input>
      <domain>
        <min> -0.35 </min>
        <max>  0.35 </max>
      </domain>
      <range>
        <min> -1 </min>
        <max>  1 </max>
      </range>
      <output>fcs/rudder-pos-norm</output>
   </aerosurface_scale>

  </channel>

  <channel name="Flaps">
   <kinematic name="Flaps Control">
     <input>fcs/flap-cmd-norm</input>
     <traverse>
       <setting>
          <position>  0 </position>
          <time>      0 </time>
       </setting>
       <setting>
          <position> 15 </position>
          <time>      4 </time>
       </setting>
       <setting>
          <position> 30 </position>
          <time>      3 </time>
       </setting>
     </traverse>
     <output>fcs/flap-pos-deg</output>
   </kinematic>

   <aerosurface_scale name="flap normalization">
      <input>fcs/flap-pos-deg</input>
      <domain>
        <min>  0 </min>
        <max> 30 </max>
      </domain>
      <range>
        <min> 0 </min>
        <max> 1 </max>
      </range>
      <output>fcs/flap-pos-norm</output>
   </aerosurface_scale>

  </channel>

  <channel name="Landing Gear">
   <kinematic name="Gear Control">
     <input>gear/gear-cmd-norm</input>
     <traverse>
       <setting>
          <position> 0 </position>
          <time>     0 </time>
       </setting>
       <setting>
          <position> 1 </position>
          <time>     5 </time>
       </setting>
     </traverse>
     <output>gear/gear-pos-norm</output>
   </kinematic>

  </channel>

  <channel name="Speedbrake">
   <kinematic name="Speedbrake Control">
     <input>fcs/speedbrake-cmd-norm</input>
     <traverse>
       <setting>
          <position> 0 </position>
          <time>     0 </time>
       </setting>
       <setting>
          <position> 1 </position>
          <time>     1 </time>
       </setting>
     </traverse>
     <output>fcs/speedbrake-pos-norm</output>
   </kinematic>

  </channel>

 </flight_control>

 <aerodynamics>

  <axis name="LIFT">

    <function name="aero/coefficient/CLalpha">
      <description>Lift_due_to_alpha</description>
      <product>
          <property>aero/qbar-psf</property>
          <property>metrics/Sw-sqft</property>
          <table>
            <independentVar lookup="row">aero/alpha-rad</independentVar>
            <tableData>
				-0.366519142918809	-1.210666284307
				-0.087266462599717	0.286604547557
				-0.069813170079773	0.383263334864
				-0.05235987755983	0.478901415731
				-0.034906585039887	0.576205417043
				-0.017453292519943	0.672119514625
				0	0.765618746365
				0.017453292519943	0.861714843021
				0.034906585039887	0.956709034951
				0.05235987755983	1.051615099128
				0.069813170079773	1.145851607763
				0.087266462599717	1.222398817472
				0.10471975511966	1.264737073154
				0.122173047639603	1.28831573075
				0.139626340159546	1.298366105173
				0.15707963267949	1.300885564567
				0.174532925199433	1.300269629509
				0.191986217719376	1.298607188212
				0.20943951023932	1.295187915753
				0.226892802759263	1.292345073895
				0.244346095279206	1.29531447969
				0.261799387799149	1.30036040224
				0.279252680319093	1.307002693577
				0.296705972839036	1.31468902618
				0.314159265358979	1.322937172011
				0.331612557878923	1.331659106881
				0.349065850398866	1.340881731672
				0.366519142918809	1.350625575936
				0.383972435438752	1.360781029215
				0.401425727958696	1.371371639448
				0.418879020478639	1.382027290182
				0.436332312998582	1.394941967231
            </tableData>
          </table>
      </product>
    </function>

    <function name="aero/coefficient/dCLflap">
       <description>Delta_Lift_due_to_flaps</description>
       <product>
           <property>aero/qbar-psf</property>
           <property>metrics/Sw-sqft</property>
           <property>fcs/flap-pos-deg</property>
           <value> 0.2 </value>
       </product>
    </function>

    <function name="aero/coefficient/dCLsb">
       <description>Delta_Lift_due_to_speedbrake</description>
       <product>
           <property>aero/qbar-psf</property>
           <property>metrics/Sw-sqft</property>
           <property>fcs/speedbrake-pos-norm</property>
           <value>-0.05</value>
       </product>
    </function>

    <function name="aero/coefficient/CLde">
       <description>Lift_due_to_Elevator_Deflection</description>
       <product>
           <property>aero/qbar-psf</property>
           <property>metrics/Sw-sqft</property>
		   <table>
				<independentVar lookup="row">fcs/elevator-pos-rad</independentVar>
	            <tableData>
				-0.698131701	-0.346
				-0.610865238	-0.319
				-0.523598776	-0.289
				-0.436332313	-0.25
				-0.34906585	-0.205
				-0.261799388	-0.156
				-0.174532925	-0.105
				-0.087266463	-0.053
				0	0
				0.087266463	0.053
				0.174532925	0.105
				0.261799388	0.156
				0.34906585	0.205
				0.436332313	0.25
				0.523598776	0.289
				0.610865238	0.319
				0.698131701	0.346
				</tableData>
           </table>
       </product>
    </function>

  </axis>

  <axis name="DRAG">

	<function name="aero/coefficient/CDDh">
		<description>Drag_due_to_horizontal_tail_deflection</description>
			<product>
				<property>aero/qbar-psf</property>
                <property>metrics/Sw-sqft</property>
                <table name="CDdHT">
					<independentVar lookup="row">aero/alpha-rad</independentVar>
					<independentVar lookup="column">fcs/elevator-pos-rad</independentVar>
                    <tableData>
							-0.5236	-0.2618	0.0000	0.2618	0.5236
					-0.3665	0.3380	0.2600	0.2000	0.2600	0.3380
					-0.0873	0.0218	0.0168	0.0129	0.0168	0.0218
					-0.0698	0.0292	0.0190	0.0146	0.0190	0.0292
					-0.0524	0.0335	0.0218	0.0168	0.0218	0.0335
					-0.0349	0.0389	0.0253	0.0195	0.0253	0.0389
					-0.0175	0.0453	0.0294	0.0226	0.0294	0.0453
					0.0000	0.0528	0.0343	0.0264	0.0343	0.0528
					0.0175	0.0612	0.0398	0.0306	0.0398	0.0612
					0.0349	0.0707	0.0459	0.0353	0.0459	0.0707
					0.0524	0.0813	0.0529	0.0407	0.0529	0.0813
					0.0698	0.0926	0.0602	0.0463	0.0602	0.0926
					0.0873	0.1130	0.0735	0.0565	0.0735	0.1130
					0.1047	0.1494	0.0971	0.0747	0.0971	0.1494
					0.1222	0.1952	0.1269	0.0976	0.1269	0.1952
					0.1396	0.2474	0.1608	0.1237	0.1608	0.2474
					0.1571	0.3035	0.1973	0.1517	0.1973	0.3035
					0.1745	0.3606	0.2344	0.1803	0.2344	0.3606
					0.1920	0.4183	0.2719	0.2091	0.2719	0.4183
					0.2094	0.4772	0.3102	0.2386	0.3102	0.4772
					0.2269	0.5351	0.3478	0.2676	0.3478	0.5351
					0.2443	0.5906	0.3839	0.2953	0.3839	0.5906
					0.2618	0.6447	0.4191	0.3224	0.4191	0.6447
					0.2793	0.6980	0.4537	0.3490	0.4537	0.6980
					0.2967	0.7502	0.4876	0.3751	0.4876	0.7502
					0.3142	0.8021	0.5214	0.4011	0.5214	0.8021
					0.3316	0.8533	0.5547	0.4267	0.5547	0.8533
					0.3491	0.9037	0.5874	0.4519	0.5874	0.9037
					0.3665	0.9534	0.6197	0.4767	0.6197	0.9534
					0.3840	1.0029	0.6519	0.5014	0.6519	1.0029
					0.4014	1.0513	0.6834	0.5257	0.6834	1.0513
					0.4189	1.0988	0.7142	0.5494	0.7142	1.0988
					0.4363	1.1458	0.7448	0.5729	0.7448	1.1458
                    </tableData>
                </table>
            </product>
    </function>

    <function name="aero/coefficient/CDmach">
       <description>Drag_due_to_mach</description>
        <product>
          <property>aero/qbar-psf</property>
          <property>metrics/Sw-sqft</property>
          <table>
            <independentVar lookup="row">velocities/mach</independentVar>
            <tableData>
                0.00      0.000
                0.7      0.000
                1.10      0.023
                1.80      0.015
            </tableData>
          </table>
        </product>
    </function>

    <function name="aero/coefficient/CDflap">
       <description>Drag_due_to_flaps</description>
         <product>
           <property>aero/qbar-psf</property>
           <property>metrics/Sw-sqft</property>
           <property>fcs/flap-pos-deg</property>
           <value> 0.024 </value>
         </product>
    </function>

    <function name="aero/coefficient/CDgear">
       <description>Drag_due_to_gear</description>
         <product>
           <property>aero/qbar-psf</property>
           <property>metrics/Sw-sqft</property>
           <property>gear/gear-pos-norm</property>
           <value>0.03</value>
         </product>
    </function>

    <function name="aero/coefficient/CDsb">
       <description>Drag_due_to_speedbrakes</description>
         <product>
           <property>aero/qbar-psf</property>
           <property>metrics/Sw-sqft</property>
           <property>fcs/speedbrake-pos-norm</property>
           <value>0.012</value>
         </product>
    </function>

    <function name="aero/coefficient/CDbeta">
       <description>Drag_due_to_sideslip</description>
       <product>
          <property>aero/qbar-psf</property>
          <property>metrics/Sw-sqft</property>
          <table>
            <independentVar lookup="row">aero/beta-rad</independentVar>
            <tableData>
              -1.57       1.230
              -0.26    0.000
               0.00       0.000
               0.26    0.000
               1.57       1.230
            </tableData>
          </table>
       </product>
    </function>

    <function name="aero/coefficient/CDde">
       <description>Drag_due_to_Elevator_Deflection</description>
       <product>
           <property>aero/qbar-psf</property>
           <property>metrics/Sw-sqft</property>
           <abs><property>fcs/elevator-pos-norm</property></abs>
           <value>0.04</value>
       </product>
    </function>

  </axis>

  <axis name="SIDE">

    <function name="aero/coefficient/CYb">
       <description>Side_force_due_to_beta</description>
       <product>
           <property>aero/qbar-psf</property>
           <property>metrics/Sw-sqft</property>
           <property>aero/beta-rad</property>
           <value>-0.99298</value>
       </product>
    </function>

  </axis>

  <axis name="ROLL">

    <function name="aero/coefficient/Clb">
       <description>Roll_moment_due_to_beta</description>
       <product>
           <property>aero/qbar-psf</property>
           <property>metrics/Sw-sqft</property>
           <property>metrics/bw-ft</property>
           <property>aero/beta-rad</property>
           <value>-0.1</value>
       </product>
    </function>

    <function name="aero/coefficient/Clp">
       <description>Roll_moment_due_to_roll_rate</description>
       <product>
           <property>aero/qbar-psf</property>
           <property>metrics/Sw-sqft</property>
           <property>metrics/bw-ft</property>
           <property>aero/bi2vel</property>
           <property>velocities/p-aero-rad_sec</property>
           <table>
             <independentVar lookup="row">aero/alpha-rad</independentVar>
             <tableData>
				-0.27925268	-0.5338
				-0.13962634	-0.5285
				-0.104719755	-0.5278
				-0.06981317	-0.5272
				-0.034906585	-0.5269
				0	-0.5268
				0.034906585	-0.5269
				0.06981317	-0.4919
				0.13962634	-0.1642
				0.157079633	-0.09975
				0.174532925	-0.09983
				0.20943951	-0.1066
				0.244346095	-0.1134
				0.27925268	-0.1094
				0.314159265	-0.1055
				0.331612558	-0.1056
				0.34906585	-0.1031
				0.366519143	-0.0996
				0.383972435	-0.09763
				0.41887902	-0.0937
             </tableData>
           </table>
       </product>
    </function>

    <function name="aero/coefficient/Clr">
       <description>Roll_moment_due_to_yaw_rate</description>
       <product>
           <property>aero/qbar-psf</property>
           <property>metrics/Sw-sqft</property>
           <property>metrics/bw-ft</property>
           <property>aero/bi2vel</property>
           <property>velocities/r-aero-rad_sec</property>
           <value>0.107</value>
       </product>
    </function>

    <function name="aero/coefficient/Clda">
       <description>Roll_moment_due_to_aileron</description>
       <product>
          <property>aero/qbar-psf</property>
          <property>metrics/Sw-sqft</property>
          <property>metrics/bw-ft</property>
          <property>fcs/left-aileron-pos-rad</property>
          <table>
            <independentVar lookup="row">velocities/mach</independentVar>
            <tableData>
              0.0    0.150
              2.0    0.057
            </tableData>
          </table>
       </product>
    </function>

    <function name="aero/coefficient/Cldr">
       <description>Roll_moment_due_to_rudder</description>
       <product>
           <property>aero/qbar-psf</property>
           <property>metrics/Sw-sqft</property>
           <property>metrics/bw-ft</property>
           <property>fcs/rudder-pos-rad</property>
           <value>0.0186</value>
       </product>
    </function>

  </axis>

  <axis name="PITCH">

    <function name="aero/coefficient/Cmalpha">
       <description>Pitch_moment_due_to_alpha</description>
       <product>
           <property>aero/qbar-psf</property>
           <property>metrics/Sw-sqft</property>
           <property>metrics/cbarw-ft</property>
           <table>
             <independentVar lookup="row">aero/alpha-rad</independentVar>
             <tableData>
				-0.3665	0.0856
				-0.0873	0.0856
				-0.0698	0.0752
				-0.0524	0.0645
				-0.0349	0.0526
				-0.0175	0.0415
				0.0000	0.0306
				0.0175	0.0194
				0.0349	0.0084
				0.0524	-0.0030
				0.0698	-0.0145
				0.0873	-0.0213
				0.1047	-0.0236
				0.1222	-0.0291
				0.1396	-0.0374
				0.1571	-0.0471
				0.1745	-0.0527
				0.1920	-0.0575
				0.2094	-0.0600
				0.2269	-0.0615
				0.2443	-0.0617
				0.2618	-0.0612
				0.2793	-0.0607
				0.2967	-0.0607
				0.3142	-0.0610
				0.3316	-0.0614
				0.3491	-0.0619
				0.3665	-0.0625
				0.3840	-0.0633
				0.4014	-0.0638
				0.4189	-0.0634
				0.4363	-0.0669
             </tableData>
           </table>
       </product>
    </function>

	<!--
	2024-03-25
	Moet nog Cmde korrek modelleer.  Dit is nog die C172
	-->

    <function name="aero/coefficient/Cmde">
       <description>Pitch_moment_due_to_elevator</description>
       <product>
          <property>aero/qbar-psf</property>
          <property>metrics/Sw-sqft</property>
          <property>metrics/cbarw-ft</property>
          <table>
            <independentVar lookup="row">fcs/elevator-pos-rad</independentVar>
            <tableData>
				-0.5236	0.1167
				-0.4363	0.0973
				-0.3491	0.0799
				-0.2618	0.0558
				-0.1745	0.0377
				-0.0873	0.0183
				0.0000	0.0000
				0.0873	-0.0183
				0.1745	-0.0377
				0.2618	-0.0558
				0.3491	-0.0799
				0.4363	-0.0973
				0.5236	-0.1167
            </tableData>
          </table>
       </product>
    </function>

	<!--
	2024-03-25
	Kry -6.04 uit OpenVSP.  Cmq en Cmadot is saamgegooi in een koeëffisiënt.
	-->

    <function name="aero/coefficient/Cmq">
       <description>Pitch_moment_due_to_pitch_rate</description>
       <product>
           <property>aero/qbar-psf</property>
           <property>metrics/Sw-sqft</property>
           <property>metrics/cbarw-ft</property>
           <property>aero/ci2vel</property>
           <property>velocities/q-aero-rad_sec</property>
           <value>-6.04</value>
       </product>
    </function>

    <function name="aero/coefficient/Cmadot">
       <description>Pitch_moment_due_to_alpha_rate</description>
       <product>
           <property>aero/qbar-psf</property>
           <property>metrics/Sw-sqft</property>
           <property>metrics/cbarw-ft</property>
           <property>aero/ci2vel</property>
           <property>aero/alphadot-rad_sec</property>
           <value>0</value>
       </product>
    </function>

  </axis>

  <axis name="YAW">
	<!--
	2024-03-25
	Gier styfheid is laag.
	-->

    <function name="aero/coefficient/Cnb">
       <description>Yaw_moment_due_to_beta</description>
       <product>
           <property>aero/qbar-psf</property>
           <property>metrics/Sw-sqft</property>
           <property>metrics/bw-ft</property>
           <property>aero/beta-rad</property>
           <value>0.00125</value>
       </product>
    </function>

	<!--
	2024-03-25
	Moet nog invul uit OpenVSP analise.
	-->
    <function name="aero/coefficient/Cnr">
       <description>Yaw_moment_due_to_yaw_rate</description>
       <product>
           <property>aero/qbar-psf</property>
           <property>metrics/Sw-sqft</property>
           <property>metrics/bw-ft</property>
           <property>aero/bi2vel</property>
           <property>velocities/r-aero-rad_sec</property>
           <value>-0.023425</value>
       </product>
    </function>

	<!--
	2024-03-25
	Maak die giermoment van rigtingroer naby aan 0, want daar is nie 'n rigtingroer nie.
	-->
    <function name="aero/coefficient/Cndr">
       <description>Yaw_moment_due_to_rudder</description>
       <product>
           <property>aero/qbar-psf</property>
           <property>metrics/Sw-sqft</property>
           <property>metrics/bw-ft</property>
           <property>fcs/rudder-pos-rad</property>
           <value>-0.00001</value>
       </product>
    </function>


	<!--
	2024-03-25
	Verander hierdie na "proverse yaw".  Moet nog dit
	reg analiseer met OpenVSP.  Die vorige waarde was -0.02.
	Verander dit na +0.02.
	-->
    <function name="aero/coefficient/Cnda">
       <description>Adverse_yaw</description>
       <product>
           <property>aero/qbar-psf</property>
           <property>metrics/Sw-sqft</property>
           <property>metrics/bw-ft</property>
           <property>fcs/left-aileron-pos-rad</property>
           <value>0.02</value>
       </product>
    </function>

  </axis>

 </aerodynamics>


    <input port="1137"/>

    <output name="outputlog\PrandtlD.csv" type="CSV" rate="10">
        <simulation> OFF </simulation>
        <atmosphere> OFF </atmosphere>
        <massprops> OFF </massprops>
        <aerosurfaces> OFF </aerosurfaces>
        <rates> OFF </rates>
        <velocities> OFF </velocities>
        <forces> ON </forces>
        <moments> ON </moments>
        <position> ON </position>
        <coefficients> ON </coefficients>
        <ground_reactions> OFF </ground_reactions>
        <fcs> OFF </fcs>
        <propulsion> OFF </propulsion>
		<property> position/h-agl-ft </property>
        <property> velocities/vc-kts </property>
		<property> fcs/throttle-cmd-norm </property>
		<property> aero/alpha-rad </property>
		<property> aero/alpha-deg </property>
	</output>

    <output name="localhost" type="SOCKET" port="1138" rate="20">
        <property> position/h-agl-ft </property>
        <property> velocities/vc-kts </property>
		<property> velocities/q-rad_sec </property>
    </output>


</fdm_config>
