<?xml version="1.0"?>
<?xml-stylesheet type="text/xsl" href="http://jsbsim.sourceforge.net/JSBSim.xsl"?>
<fdm_config name="MV0" version="2.0" release="ALPHA"
   xmlns:xsi="http://www.w3.org/2001/XMLSchema-instance"
   xsi:noNamespaceSchemaLocation="http://jsbsim.sourceforge.net/JSBSim.xsd">

 <fileheader>
  <author> N. Agenbag </author>
  <filecreationdate> 2010-08-31 </filecreationdate>
  <version>$Revision: 1.10 $</version>
  <description> Modelleer Blok 1 meeuvlerk. </description>
 </fileheader>

<!--
  File:     MV1.xml
  Inputs:
    name:          MV1
    type:          light single
    max weight:    352.8 lb
    wing span:     39.372 ft
    length:        9.843 ft
    wing area:     129.18 sq-ft
    gear type:     tricycle
    retractable?:  yes
    # engines:     1
    engine type:   piston
    engine layout: aft fuselage
    yaw damper?    no

  Outputs:
    wing loading:  2.73 lb/sq-ft
    CL-alpha:      5 per radian
    CL-0:          0.25
    CL-max:        1.4
    CD-0:          0.024
    K:             0.04

'n Blok 1 meeuvlerk is die korrekte koeefisiente, maar minder tabelle.
-->

 <metrics>
   <wingarea  unit="FT2">  129.17 </wingarea>
   <wingspan  unit="FT" >   39.37 </wingspan>
   <wing_incidence>          0.00 </wing_incidence>
   <chord     unit="FT" >    3.34 </chord>
   <htailarea unit="FT2">    0.00 </htailarea>
   <htailarm  unit="FT" >    0.00 </htailarm>
   <vtailarea unit="FT2">    0.00 </vtailarea>
   <vtailarm  unit="FT" >    0.00 </vtailarm>
   <location name="AERORP" unit="IN">
     <x>  14.32 </x>
     <y>   0.00 </y>
     <z>   0.00 </z>
   </location>
   <location name="EYEPOINT" unit="IN">
     <x>  14.32 </x>
     <y>  0.00 </y>
     <z>  0.00 </z>
   </location>
   <location name="VRP" unit="IN">
     <x>0</x>
     <y>0</y>
     <z>0</z>
   </location>
 </metrics>

 <mass_balance>
   <ixx unit="SLUG*FT2">       432 </ixx>
   <iyy unit="SLUG*FT2">        17.2 </iyy>
   <izz unit="SLUG*FT2">       449 </izz>
   <emptywt unit="LBS" >       375 </emptywt>
   <location name="CG" unit="IN">
     <x>  14.32 </x>
     <y>   0.00 </y>
     <z>   0.00 </z>
   </location>
 </mass_balance>

 <ground_reactions>

  <contact type="BOGEY" name="NOSE">
   <location unit="IN">
     <x>  -103.79 </x>
     <y>   0.00 </y>
     <z> -59.06 </z>
   </location>
   <static_friction>  0.80 </static_friction>
   <dynamic_friction> 0.50 </dynamic_friction>
   <rolling_friction> 0.02 </rolling_friction>
   <spring_coeff unit="LBS/FT">        120.00 </spring_coeff>
   <damping_coeff unit="LBS/FT/SEC">    10.0 </damping_coeff>
   <max_steer unit="DEG"> 5.00 </max_steer>
   <brake_group>NONE</brake_group>
   <retractable>1</retractable>
 </contact>

  <contact type="BOGEY" name="LEFT_MAIN">
   <location unit="IN">
     <x>  73.37 </x>
     <y> -78.74 </y>
     <z> -59.06 </z>
   </location>
   <static_friction>  0.80 </static_friction>
   <dynamic_friction> 0.50 </dynamic_friction>
   <rolling_friction> 0.02 </rolling_friction>
   <spring_coeff unit="LBS/FT">        120.00 </spring_coeff>
   <damping_coeff unit="LBS/FT/SEC">    10.0 </damping_coeff>
   <max_steer unit="DEG">0</max_steer>
   <brake_group>LEFT</brake_group>
   <retractable>1</retractable>
 </contact>

  <contact type="BOGEY" name="RIGHT_MAIN">
   <location unit="IN">
     <x>  73.37 </x>
     <y>  78.74 </y>
     <z> -59.06 </z>
   </location>
   <static_friction>  0.80 </static_friction>
   <dynamic_friction> 0.50 </dynamic_friction>
   <rolling_friction> 0.02 </rolling_friction>
   <spring_coeff unit="LBS/FT">        120.00 </spring_coeff>
   <damping_coeff unit="LBS/FT/SEC">    10.0 </damping_coeff>
   <max_steer unit="DEG">0</max_steer>
   <brake_group>RIGHT</brake_group>
   <retractable>1</retractable>
 </contact>

  <contact type="STRUCTURE" name="LEFT_WING">
    <location unit="IN">
     <x>  56.70 </x>
     <y> -19.69 </y>
     <z>  -2.95 </z>
    </location>
    <static_friction>  0.80 </static_friction>
    <dynamic_friction> 0.50 </dynamic_friction>
    <spring_coeff unit="LBS/FT">        352.80 </spring_coeff>
    <damping_coeff unit="LBS/FT/SEC">    70.56 </damping_coeff>
 </contact>

  <contact type="STRUCTURE" name="RIGHT_WING">
    <location unit="IN">
     <x>  56.70 </x>
     <y>  19.69 </y>
     <z>  -2.95 </z>
    </location>
    <static_friction>  0.80 </static_friction>
    <dynamic_friction> 0.50 </dynamic_friction>
    <spring_coeff unit="LBS/FT">        352.80 </spring_coeff>
    <damping_coeff unit="LBS/FT/SEC">    70.56 </damping_coeff>
 </contact>

 </ground_reactions>

 <propulsion>

   <engine file="eng_io320">
    <location unit="IN">
      <x>  14.32 </x>
      <y>   0.00 </y>
      <z>   0.00 </z>
    </location>
    <orient unit="DEG">
      <pitch> 0.00 </pitch>
      <roll>   0.00 </roll>
      <yaw>   0.00 </yaw>
    </orient>
    <feed>0</feed>
    <thruster file="prop_75in2f">
     <location unit="IN">
       <x>  14.32 </x>
       <y>   0.00 </y>
       <z>   0.00 </z>
     </location>
     <orient unit="DEG">
       <pitch> 0.00 </pitch>
       <roll>   0.00 </roll>
       <yaw>   0.00 </yaw>
     </orient>
    </thruster>
  </engine>

  <tank type="FUEL" number="0">
     <location unit="IN">
       <x>  14.32 </x>
       <y>   0.00 </y>
       <z>   0.00 </z>
     </location>
     <capacity unit="LBS"> 100.00 </capacity>
     <contents unit="LBS">  50.00 </contents>
  </tank>

  <tank type="FUEL" number="1">
     <location unit="IN">
       <x>  14.32 </x>
       <y>   0.00 </y>
       <z>   0.00 </z>
     </location>
     <capacity unit="LBS"> 100.00 </capacity>
     <contents unit="LBS">  50.00 </contents>
  </tank>

 </propulsion>

 <flight_control name="FCS: MV0">

  <channel name="Pitch">
   <summer name="Pitch Trim Sum">
      <input>fcs/elevator-cmd-norm</input>
      <input>fcs/pitch-trim-cmd-norm</input>
      <clipto>
        <min> -1 </min>
        <max>  1 </max>
      </clipto>
   </summer>

   <aerosurface_scale name="Elevator Control">
      <input>fcs/pitch-trim-sum</input>
      <range>
        <min> -0.35 </min>
        <max>  0.35 </max>
      </range>
      <output>fcs/elevator-pos-rad</output>
   </aerosurface_scale>

   <aerosurface_scale name="elevator normalization">
      <input>fcs/elevator-pos-rad</input>
      <domain>
        <min> -0.35 </min>
        <max>  0.35 </max>
      </domain>
      <range>
        <min> -1 </min>
        <max>  1 </max>
      </range>
      <output>fcs/elevator-pos-norm</output>
   </aerosurface_scale>

  </channel>

  <channel name="Roll">
   <summer name="Roll Trim Sum">
      <input>fcs/aileron-cmd-norm</input>
      <input>fcs/roll-trim-cmd-norm</input>
      <clipto>
        <min> -1 </min>
        <max>  1 </max>
      </clipto>
   </summer>

   <aerosurface_scale name="Left Aileron Control">
      <input>fcs/roll-trim-sum</input>
      <range>
        <min> -0.35 </min>
        <max>  0.35 </max>
      </range>
      <output>fcs/left-aileron-pos-rad</output>
   </aerosurface_scale>

   <aerosurface_scale name="Right Aileron Control">
      <input>fcs/roll-trim-sum</input>
      <range>
        <min> -0.35 </min>
        <max>  0.35 </max>
      </range>
      <output>fcs/right-aileron-pos-rad</output>
   </aerosurface_scale>

   <aerosurface_scale name="left aileron normalization">
      <input>fcs/left-aileron-pos-rad</input>
      <domain>
        <min> -0.35 </min>
        <max>  0.35 </max>
      </domain>
      <range>
        <min> -1 </min>
        <max>  1 </max>
      </range>
      <output>fcs/left-aileron-pos-norm</output>
   </aerosurface_scale>

   <aerosurface_scale name="right aileron normalization">
      <input>fcs/right-aileron-pos-rad</input>
      <domain>
        <min> -0.35 </min>
        <max>  0.35 </max>
      </domain>
      <range>
        <min> -1 </min>
        <max>  1 </max>
      </range>
      <output>fcs/right-aileron-pos-norm</output>
   </aerosurface_scale>

  </channel>

  <channel name="Yaw">
   <summer name="Rudder Command Sum">
      <input>fcs/rudder-cmd-norm</input>
      <input>fcs/yaw-trim-cmd-norm</input>
      <clipto>
        <min> -0.35 </min>
        <max>  0.35 </max>
      </clipto>
   </summer>

   <aerosurface_scale name="Rudder Control">
      <input>fcs/rudder-command-sum</input>
      <range>
        <min> -0.35 </min>
        <max>  0.35 </max>
      </range>
      <output>fcs/rudder-pos-rad</output>
   </aerosurface_scale>

   <aerosurface_scale name="rudder normalization">
      <input>fcs/rudder-pos-rad</input>
      <domain>
        <min> -0.35 </min>
        <max>  0.35 </max>
      </domain>
      <range>
        <min> -1 </min>
        <max>  1 </max>
      </range>
      <output>fcs/rudder-pos-norm</output>
   </aerosurface_scale>

  </channel>

  <channel name="Flaps">
   <kinematic name="Flaps Control">
     <input>fcs/flap-cmd-norm</input>
     <traverse>
       <setting>
          <position>  0 </position>
          <time>      0 </time>
       </setting>
       <setting>
          <position> 15 </position>
          <time>      4 </time>
       </setting>
       <setting>
          <position> 30 </position>
          <time>      3 </time>
       </setting>
     </traverse>
     <output>fcs/flap-pos-deg</output>
   </kinematic>

   <aerosurface_scale name="flap normalization">
      <input>fcs/flap-pos-deg</input>
      <domain>
        <min>  0 </min>
        <max> 30 </max>
      </domain>
      <range>
        <min> 0 </min>
        <max> 1 </max>
      </range>
      <output>fcs/flap-pos-norm</output>
   </aerosurface_scale>

  </channel>

  <channel name="Landing Gear">
   <kinematic name="Gear Control">
     <input>gear/gear-cmd-norm</input>
     <traverse>
       <setting>
          <position> 0 </position>
          <time>     0 </time>
       </setting>
       <setting>
          <position> 1 </position>
          <time>     5 </time>
       </setting>
     </traverse>
     <output>gear/gear-pos-norm</output>
   </kinematic>

  </channel>

  <channel name="Speedbrake">
   <kinematic name="Speedbrake Control">
     <input>fcs/speedbrake-cmd-norm</input>
     <traverse>
       <setting>
          <position> 0 </position>
          <time>     0 </time>
       </setting>
       <setting>
          <position> 1 </position>
          <time>     1 </time>
       </setting>
     </traverse>
     <output>fcs/speedbrake-pos-norm</output>
   </kinematic>

  </channel>

 </flight_control>

 <aerodynamics>

  <axis name="LIFT">

    <function name="aero/coefficient/CLalpha">
      <description>Lift_due_to_alpha</description>
      <product>
          <property>aero/qbar-psf</property>
          <property>metrics/Sw-sqft</property>
          <table>
            <independentVar lookup="row">aero/alpha-rad</independentVar>
            <tableData>
				-0.366519143	-1.411
				-0.226892803	-0.724
				-0.191986218	-0.551
				-0.157079633	-0.378
				-0.122173048	-0.204
				-0.087266463	-0.03
				-0.052359878	0.144
				-0.017453293	0.318
				0.052359878	0.599
				0.06981317	0.618
				0.087266463	0.636
				0.122173048	0.674
				0.157079633	0.718
				0.191986218	0.763
				0.226892803	0.806
				0.244346095	0.828
				0.261799388	0.851
				0.27925268	0.873
				0.296705973	0.895
				0.331612558	0.938
            </tableData>
          </table>
      </product>
    </function>

    <function name="aero/coefficient/dCLflap">
       <description>Delta_Lift_due_to_flaps</description>
       <product>
           <property>aero/qbar-psf</property>
           <property>metrics/Sw-sqft</property>
           <property>fcs/flap-pos-deg</property>
           <value> 0.2 </value>
       </product>
    </function>

    <function name="aero/coefficient/dCLsb">
       <description>Delta_Lift_due_to_speedbrake</description>
       <product>
           <property>aero/qbar-psf</property>
           <property>metrics/Sw-sqft</property>
           <property>fcs/speedbrake-pos-norm</property>
           <value>-0.05</value>
       </product>
    </function>

    <function name="aero/coefficient/CLde">
       <description>Lift_due_to_Elevator_Deflection</description>
       <product>
           <property>aero/qbar-psf</property>
           <property>metrics/Sw-sqft</property>
		   <table>
				<independentVar lookup="row">fcs/elevator-pos-rad</independentVar>
	            <tableData>
				-0.698131701	-0.346
				-0.610865238	-0.319
				-0.523598776	-0.289
				-0.436332313	-0.25
				-0.34906585	-0.205
				-0.261799388	-0.156
				-0.174532925	-0.105
				-0.087266463	-0.053
				0	0
				0.087266463	0.053
				0.174532925	0.105
				0.261799388	0.156
				0.34906585	0.205
				0.436332313	0.25
				0.523598776	0.289
				0.610865238	0.319
				0.698131701	0.346
				</tableData>
           </table>
       </product>
    </function>

  </axis>

  <axis name="DRAG">

	<function name="aero/coefficient/CDDh">
		<description>Drag_due_to_horizontal_tail_deflection</description>
			<product>
				<property>aero/qbar-psf</property>
                <property>metrics/Sw-sqft</property>
                <table name="CDdHT">
					<independentVar lookup="row">aero/alpha-rad</independentVar>
					<independentVar lookup="column">fcs/elevator-pos-rad</independentVar>
                    <tableData>
							-0.5236	-0.2618	0.0000	0.2618	0.5236
					-0.2793	0.2640	0.2556	0.2660	0.2556	0.2640
					-0.1396	0.1132	0.0950	0.0940	0.0950	0.1132
					-0.1047	0.0995	0.0789	0.0750	0.0789	0.0995
					-0.0698	0.0889	0.0657	0.0590	0.0657	0.0889
					-0.0349	0.0822	0.0566	0.0470	0.0566	0.0822
					0.0000	0.0785	0.0505	0.0380	0.0505	0.0785
					0.0349	0.0888	0.0583	0.0430	0.0583	0.0888
					0.0698	0.1021	0.0693	0.0510	0.0693	0.1021
					0.1396	0.1328	0.0950	0.0710	0.0950	0.1328
					0.1571	0.1364	0.0974	0.0720	0.0974	0.1364
					0.1745	0.1411	0.1008	0.0740	0.1008	0.1411
					0.2094	0.1494	0.1067	0.0770	0.1067	0.1494
					0.2443	0.1597	0.1146	0.0820	0.1146	0.1597
					0.2793	0.1700	0.1224	0.0870	0.1224	0.1700
					0.3142	0.1814	0.1313	0.0930	0.1313	0.1814
					0.3316	0.1870	0.1357	0.0960	0.1357	0.1870
					0.3491	0.1937	0.1412	0.1000	0.1412	0.1937
					0.3665	0.2003	0.1466	0.1040	0.1466	0.2003
					0.3840	0.2070	0.1520	0.1080	0.1520	0.2070
					0.4189	0.2223	0.1649	0.1180	0.1649	0.2223
                    </tableData>
                </table>
            </product>
    </function>

    <function name="aero/coefficient/CDmach">
       <description>Drag_due_to_mach</description>
        <product>
          <property>aero/qbar-psf</property>
          <property>metrics/Sw-sqft</property>
          <table>
            <independentVar lookup="row">velocities/mach</independentVar>
            <tableData>
                0.00      0.000
                0.7      0.000
                1.10      0.023
                1.80      0.015
            </tableData>
          </table>
        </product>
    </function>

    <function name="aero/coefficient/CDflap">
       <description>Drag_due_to_flaps</description>
         <product>
           <property>aero/qbar-psf</property>
           <property>metrics/Sw-sqft</property>
           <property>fcs/flap-pos-deg</property>
           <value> 0.024 </value>
         </product>
    </function>

    <function name="aero/coefficient/CDgear">
       <description>Drag_due_to_gear</description>
         <product>
           <property>aero/qbar-psf</property>
           <property>metrics/Sw-sqft</property>
           <property>gear/gear-pos-norm</property>
           <value>0.03</value>
         </product>
    </function>

    <function name="aero/coefficient/CDsb">
       <description>Drag_due_to_speedbrakes</description>
         <product>
           <property>aero/qbar-psf</property>
           <property>metrics/Sw-sqft</property>
           <property>fcs/speedbrake-pos-norm</property>
           <value>0.012</value>
         </product>
    </function>

    <function name="aero/coefficient/CDbeta">
       <description>Drag_due_to_sideslip</description>
       <product>
          <property>aero/qbar-psf</property>
          <property>metrics/Sw-sqft</property>
          <table>
            <independentVar lookup="row">aero/beta-rad</independentVar>
            <tableData>
              -1.57       1.230
              -0.26    0.000
               0.00       0.000
               0.26    0.000
               1.57       1.230
            </tableData>
          </table>
       </product>
    </function>

    <function name="aero/coefficient/CDde">
       <description>Drag_due_to_Elevator_Deflection</description>
       <product>
           <property>aero/qbar-psf</property>
           <property>metrics/Sw-sqft</property>
           <abs><property>fcs/elevator-pos-norm</property></abs>
           <value>0.04</value>
       </product>
    </function>

  </axis>

  <axis name="SIDE">

    <function name="aero/coefficient/CYb">
       <description>Side_force_due_to_beta</description>
       <product>
           <property>aero/qbar-psf</property>
           <property>metrics/Sw-sqft</property>
           <property>aero/beta-rad</property>
           <value>-0.99298</value>
       </product>
    </function>

  </axis>

  <axis name="ROLL">

    <function name="aero/coefficient/Clb">
       <description>Roll_moment_due_to_beta</description>
       <product>
           <property>aero/qbar-psf</property>
           <property>metrics/Sw-sqft</property>
           <property>metrics/bw-ft</property>
           <property>aero/beta-rad</property>
           <value>-0.1</value>
       </product>
    </function>

    <function name="aero/coefficient/Clp">
       <description>Roll_moment_due_to_roll_rate</description>
       <product>
           <property>aero/qbar-psf</property>
           <property>metrics/Sw-sqft</property>
           <property>metrics/bw-ft</property>
           <property>aero/bi2vel</property>
           <property>velocities/p-aero-rad_sec</property>
           <table>
             <independentVar lookup="row">aero/alpha-rad</independentVar>
             <tableData>
				-0.27925268	-0.5338
				-0.13962634	-0.5285
				-0.104719755	-0.5278
				-0.06981317	-0.5272
				-0.034906585	-0.5269
				0	-0.5268
				0.034906585	-0.5269
				0.06981317	-0.4919
				0.13962634	-0.1642
				0.157079633	-0.09975
				0.174532925	-0.09983
				0.20943951	-0.1066
				0.244346095	-0.1134
				0.27925268	-0.1094
				0.314159265	-0.1055
				0.331612558	-0.1056
				0.34906585	-0.1031
				0.366519143	-0.0996
				0.383972435	-0.09763
				0.41887902	-0.0937
             </tableData>
           </table>
       </product>
    </function>

    <function name="aero/coefficient/Clr">
       <description>Roll_moment_due_to_yaw_rate</description>
       <product>
           <property>aero/qbar-psf</property>
           <property>metrics/Sw-sqft</property>
           <property>metrics/bw-ft</property>
           <property>aero/bi2vel</property>
           <property>velocities/r-aero-rad_sec</property>
           <value>0.107</value>
       </product>
    </function>

    <function name="aero/coefficient/Clda">
       <description>Roll_moment_due_to_aileron</description>
       <product>
          <property>aero/qbar-psf</property>
          <property>metrics/Sw-sqft</property>
          <property>metrics/bw-ft</property>
          <property>fcs/left-aileron-pos-rad</property>
          <table>
            <independentVar lookup="row">velocities/mach</independentVar>
            <tableData>
              0.0    0.150
              2.0    0.057
            </tableData>
          </table>
       </product>
    </function>

    <function name="aero/coefficient/Cldr">
       <description>Roll_moment_due_to_rudder</description>
       <product>
           <property>aero/qbar-psf</property>
           <property>metrics/Sw-sqft</property>
           <property>metrics/bw-ft</property>
           <property>fcs/rudder-pos-rad</property>
           <value>0.0186</value>
       </product>
    </function>

  </axis>

  <axis name="PITCH">

    <function name="aero/coefficient/Cmalpha">
       <description>Pitch_moment_due_to_alpha</description>
       <product>
           <property>aero/qbar-psf</property>
           <property>metrics/Sw-sqft</property>
           <property>metrics/cbarw-ft</property>
           <table>
             <independentVar lookup="row">aero/alpha-rad</independentVar>
             <tableData>
				-0.2793	0.0439
				-0.1396	0.0249
				-0.1047	0.0207
				-0.0698	0.0168
				-0.0349	0.0129
				0.0000	0.0092
				0.0349	0.0055
				0.0698	0.0019
				0.1396	-0.0023
				0.1571	-0.0012
				0.1745	-0.0001
				0.2094	0.0018
				0.2443	0.0031
				0.2793	0.0040
				0.3142	0.0045
				0.3316	0.0046
				0.3491	0.0046
				0.3665	0.0045
				0.3840	0.0043
				0.4189	0.0036
             </tableData>
           </table>
       </product>
    </function>

    <function name="aero/coefficient/Cmde">
       <description>Pitch_moment_due_to_elevator</description>
       <product>
          <property>aero/qbar-psf</property>
          <property>metrics/Sw-sqft</property>
          <property>metrics/cbarw-ft</property>
          <table>
            <independentVar lookup="row">fcs/elevator-pos-rad</independentVar>
            <tableData>
				-0.5236	0.1167
				-0.4363	0.0973
				-0.3491	0.0799
				-0.2618	0.0558
				-0.1745	0.0377
				-0.0873	0.0183
				0.0000	0.0000
				0.0873	-0.0183
				0.1745	-0.0377
				0.2618	-0.0558
				0.3491	-0.0799
				0.4363	-0.0973
				0.5236	-0.1167
            </tableData>
          </table>
       </product>
    </function>

    <function name="aero/coefficient/Cmq">
       <description>Pitch_moment_due_to_pitch_rate</description>
       <product>
           <property>aero/qbar-psf</property>
           <property>metrics/Sw-sqft</property>
           <property>metrics/cbarw-ft</property>
           <property>aero/ci2vel</property>
           <property>velocities/q-aero-rad_sec</property>
           <value>-2.035</value>
       </product>
    </function>

    <function name="aero/coefficient/Cmadot">
       <description>Pitch_moment_due_to_alpha_rate</description>
       <product>
           <property>aero/qbar-psf</property>
           <property>metrics/Sw-sqft</property>
           <property>metrics/cbarw-ft</property>
           <property>aero/ci2vel</property>
           <property>aero/alphadot-rad_sec</property>
           <value>0</value>
       </product>
    </function>

  </axis>

  <axis name="YAW">

    <function name="aero/coefficient/Cnb">
       <description>Yaw_moment_due_to_beta</description>
       <product>
           <property>aero/qbar-psf</property>
           <property>metrics/Sw-sqft</property>
           <property>metrics/bw-ft</property>
           <property>aero/beta-rad</property>
           <value>0.02106</value>
       </product>
    </function>

    <function name="aero/coefficient/Cnr">
       <description>Yaw_moment_due_to_yaw_rate</description>
       <product>
           <property>aero/qbar-psf</property>
           <property>metrics/Sw-sqft</property>
           <property>metrics/bw-ft</property>
           <property>aero/bi2vel</property>
           <property>velocities/r-aero-rad_sec</property>
           <value>-0.023425</value>
       </product>
    </function>

    <function name="aero/coefficient/Cndr">
       <description>Yaw_moment_due_to_rudder</description>
       <product>
           <property>aero/qbar-psf</property>
           <property>metrics/Sw-sqft</property>
           <property>metrics/bw-ft</property>
           <property>fcs/rudder-pos-rad</property>
           <value>-0.01796</value>
       </product>
    </function>

    <function name="aero/coefficient/Cnda">
       <description>Adverse_yaw</description>
       <product>
           <property>aero/qbar-psf</property>
           <property>metrics/Sw-sqft</property>
           <property>metrics/bw-ft</property>
           <property>fcs/left-aileron-pos-rad</property>
           <value>-0.02</value>
       </product>
    </function>

  </axis>

 </aerodynamics>


    <input port="1137"/>

    <output name="outputlog\Meeuvlerkuit_MV1.csv" type="CSV" rate="10">
        <simulation> OFF </simulation>
        <atmosphere> OFF </atmosphere>
        <massprops> OFF </massprops>
        <aerosurfaces> OFF </aerosurfaces>
        <rates> OFF </rates>
        <velocities> OFF </velocities>
        <forces> ON </forces>
        <moments> ON </moments>
        <position> ON </position>
        <coefficients> ON </coefficients>
        <ground_reactions> OFF </ground_reactions>
        <fcs> OFF </fcs>
        <propulsion> OFF </propulsion>
		<property> position/h-agl-ft </property>
        <property> velocities/vc-kts </property>
		<property> fcs/throttle-cmd-norm </property>
		<property> aero/alpha-rad </property>
		<property> aero/alpha-deg </property>
	</output>

    <output name="localhost" type="SOCKET" port="1138" rate="20">
        <property> position/h-agl-ft </property>
        <property> velocities/vc-kts </property>
		<property> velocities/q-rad_sec </property>
    </output>


</fdm_config>
